<?xml version="1.0"?>
<?xml-stylesheet type="text/xsl" href="http://jsbsim.sourceforge.net/JSBSim.xsl"?>
<fdm_config name="F-35" version="2.0" release="ALPHA"
   xmlns:xsi="http://www.w3.org/2001/XMLSchema-instance"
   xsi:noNamespaceSchemaLocation="http://jsbsim.sourceforge.net/JSBSim.xsd">

 <fileheader>
  <author> Aeromatic v 0.96 </author>
  <filecreationdate>2024-12-02</filecreationdate>
  <version>$Revision: 1.20 $</version>
  <description> Models a F-35. </description>
 </fileheader>

<!--
  File:     F-35.xml
  Inputs:
    name:          F-35
    type:          single-engine transonic/supersonic fighter
    max weight:    70106 lb
    wing span:     35 ft
    length:        51 ft
    wing area:     unspecified
    gear type:     tricycle
    castering:
    retractable?:  yes
    # engines:     1
    engine type:   turbine
    engine layout: aft fuselage
    yaw damper?    yes
  Outputs:
    wing loading:  95.00 lb/sq-ft
    payload:       21592.6 lbs
    CL-alpha:      3.5 per radian
    CL-0:          0.08
    CL-max:        1
    CD-0:          0.021
    K:             0.12

-->

 <metrics>
   <wingarea  unit="FT2">  737.96 </wingarea>
   <wingspan  unit="FT" >   35.00 </wingspan>
   <wing_incidence>          2.00 </wing_incidence>
   <chord     unit="FT" >   21.08 </chord>
   <htailarea unit="FT2">  147.59 </htailarea>
   <htailarm  unit="FT" >   20.40 </htailarm>
   <vtailarea unit="FT2">   88.55 </vtailarea>
   <vtailarm  unit="FT" >   20.40 </vtailarm>
   <location name="AERORP" unit="IN">
     <x> 268.52 </x>
     <y>   0.00 </y>
     <z>   0.00 </z>
   </location>
   <location name="EYEPOINT" unit="IN">
     <x> 122.40 </x>
     <y>   0.00 </y>
     <z>  36.00 </z>
   </location>
   <location name="VRP" unit="IN">
     <x>0</x>
     <y>0</y>
     <z>0</z>
   </location>
 </metrics>

 <mass_balance>
   <ixx unit="SLUG*FT2">     25762 </ixx>
   <iyy unit="SLUG*FT2">     91916 </iyy>
   <izz unit="SLUG*FT2">     85344 </izz>
   <emptywt unit="LBS" >     37156 </emptywt>
   <location name="CG" unit="IN">

     <x> 268.52 </x>
     <y>   0.00 </y>
     <z> -15.36 </z>
   </location>

 </mass_balance>

 <ground_reactions>

  <contact type="BOGEY" name="NOSE">
   <location unit="IN">
     <x>  -79.56 </x>
     <y>   0.00 </y>
     <z> -81.44 </z>
   </location>
   <static_friction>  0.80 </static_friction>
   <dynamic_friction> 0.50 </dynamic_friction>
   <rolling_friction> 0.02 </rolling_friction>
   <spring_coeff unit="LBS/FT">      21031.80 </spring_coeff>
   <damping_coeff unit="LBS/FT/SEC"> 10515.90 </damping_coeff>
   <max_steer unit="DEG"> 45.00 </max_steer>
   <brake_group>NONE</brake_group>
   <retractable>1</retractable>
  </contact>

  <contact type="BOGEY" name="LEFT_MAIN">
   <location unit="IN">
     <x> 281.89 </x>
     <y> -37.80 </y>
     <z> -81.84 </z>
   </location>
   <static_friction>  0.80 </static_friction>
   <dynamic_friction> 0.50 </dynamic_friction>
   <rolling_friction> 0.02 </rolling_friction>
   <spring_coeff unit="LBS/FT">      60000.00 </spring_coeff>
   <damping_coeff unit="LBS/FT/SEC"> 30000.00 </damping_coeff>
   <max_steer unit="DEG">0</max_steer>
   <brake_group>LEFT</brake_group>
   <retractable>1</retractable>
  </contact>

  <contact type="BOGEY" name="RIGHT_MAIN">
   <location unit="IN">
     <x> 281.89 </x>
     <y>  37.80 </y>
     <z> -81.84 </z>
   </location>
   <static_friction>  0.80 </static_friction>
   <dynamic_friction> 0.50 </dynamic_friction>
   <rolling_friction> 0.02 </rolling_friction>
   <spring_coeff unit="LBS/FT">      60000.00 </spring_coeff>
   <damping_coeff unit="LBS/FT/SEC"> 30000.00 </damping_coeff>
   <max_steer unit="DEG">0</max_steer>
   <brake_group>RIGHT</brake_group>
   <retractable>1</retractable>
  </contact>

  <contact type="STRUCTURE" name="LEFT_WING">
    <location unit="IN">
     <x> 368.52 </x>
     <y> -17.55 </y>
     <z> -15.36 </z>
    </location>
    <static_friction>  0.80 </static_friction>
    <dynamic_friction> 0.50 </dynamic_friction>
    <spring_coeff unit="LBS/FT">      59535.00 </spring_coeff>
    <damping_coeff unit="LBS/FT/SEC"> 11907.00 </damping_coeff>
 </contact>

  <contact type="STRUCTURE" name="RIGHT_WING">
    <location unit="IN">
     <x> 368.52 </x>
     <y>  17.55 </y>
     <z> -15.36 </z>
    </location>
    <static_friction>  0.80 </static_friction>
    <dynamic_friction> 0.50 </dynamic_friction>
    <spring_coeff unit="LBS/FT">      59535.00 </spring_coeff>
    <damping_coeff unit="LBS/FT/SEC"> 11907.00 </damping_coeff>
 </contact>


 </ground_reactions>

 <propulsion>

        <engine file="F135-PW-600f">
    <location unit="IN">
      <x> 354.20 </x>
      <y>   0.00 </y>
      <z>   -15.36 </z>
    </location>
    <orient unit="DEG">
      <pitch> 0.00 </pitch>
      <roll>   0.00 </roll>
      <yaw>   0.00 </yaw>
    </orient>
    <feed>0</feed>
    <feed>1</feed>
    <feed>2</feed>
    <feed>3</feed>
    <thruster file="direct">
     <location unit="IN">
       <x> 354.20 </x>
       <y>   0.00 </y>
       <z>   -15.36 </z>
     </location>
     <orient unit="DEG">
       <pitch> 0.00 </pitch>
       <roll>   0.00 </roll>
       <yaw>   0.00 </yaw>
     </orient>
    </thruster>
        </engine>

  <tank type="FUEL" number="0">
     <location unit="IN">
       <x> 268.52 </x>
       <y>   0.00 </y>
       <z> -15.36 </z>
     </location>
     <capacity unit="LBS"> 5678.59 </capacity>
     <contents unit="LBS"> 5678.29 </contents>
  </tank>

  <tank type="FUEL" number="1">
     <location unit="IN">
       <x> 268.52 </x>
       <y>   0.00 </y>
       <z> -15.36 </z>
     </location>
     <capacity unit="LBS"> 5678.59 </capacity>
     <contents unit="LBS"> 5678.29 </contents>
  </tank>

  <tank type="FUEL" number="3">
     <location unit="IN">
       <x> 268.52 </x>
       <y>   0.00 </y>
       <z> -15.36 </z>
     </location>
     <capacity unit="LBS"> 3678.59 </capacity>
     <contents unit="LBS"> 3678.29 </contents>
  </tank>

  <tank type="FUEL" number="4">
     <location unit="IN">
       <x> 268.52 </x>
       <y>   0.00 </y>
       <z> -15.36 </z>
     </location>
     <capacity unit="LBS"> 3678.59 </capacity>
     <contents unit="LBS"> 3678.29 </contents>
  </tank>


 </propulsion>

 <flight_control name="FCS: F-35">


<!--Fly by wire controller-->

<function name="fcs/pitch-trim-fbw-pre">
            <description>Pitch trim FBW</description>
            <product>
              <table>
                 <independentVar lookup="row">/velocities/airspeed-kt</independentVar>
                 <independentVar lookup="column">/controls/engines/engine/throttle</independentVar>
                 <tableData>
                      0           0.98         1
                250  -0.17575   -0.17575   -0.19325
                300  -0.10675   -0.10675   -0.12425
                400  -0.04975   -0.04975   -0.06725
                500  -0.01575   -0.01575   -0.03325   <!--With after burner add -0.0175-->
                600  0.00525    0.00525    -0.01225
                700  0.03225    0.03225     0.01475
                774  0.05725    0.05725     0.03975
                 </tableData>
              </table>
            </product>
          </function>


<function name="fcs/pitch-trim-fbw">
            <description>Pitch trim FBW</description>
            <sum>
<property>fcs/pitch-trim-fbw-pre</property>
    <table>
            <independentVar lookup="row">/controls/engines/engine/throttle</independentVar>
            <tableData>
              0      0.034
              0.98   0.034
              1      0.055
            </tableData>
          </table>
            </sum>
          </function>


<!--FBW limiter-->


<function name="fcs/elevator-pos-norm-limit">

    <product>

      <property>fcs/pitch-trim-sum</property> <!--if its Zero. Itll Cancel out the glimit, Making this function output 0-->

    <table>
            <independentVar lookup="row">/velocities/airspeed-kt</independentVar>
            <independentVar lookup="column">/controls/engines/engine/throttle</independentVar>
            <tableData>
                     0    0.1  0.2  0.3  0.4  0.5  0.6  0.7  0.8  0.9  1
              380    1    1    1    1    1    1    1    1    1    1    1
<!--6.2-->    400    1    1    1    1    1    1    1    1    1    1    1
<!--8.6-->    450    1    1    1    1    1    1    1    1    1    1    1
<!--6.2-->    500    1    1    1    1    1    1    1    1    1    1    1
<!--6.2-->    550    0.8  0.8  0.8  0.8  0.8  0.8  0.8  0.8  0.8  0.8  0.8
<!--6.2-->    600    0.7  0.7  0.7  0.7  0.7  0.7  0.7  0.7  0.7  0.7  0.7
<!--6.2-->    700    0.58 0.58 0.58 0.58 0.58 0.58 0.58 0.58 0.58 0.58 0.58
<!--6.2-->    800    0.47 0.47 0.47 0.47 0.47 0.47 0.47 0.47 0.47 0.47 0.47
            </tableData>
          </table>
</product>
   </function>

<!--Lef-->


   <function name="fcs/elev-ani-main">  <!--Main Elevator POS with Limit-->
<product>
      <property>fcs/elevator-pos-norm-limit</property>
      <value>1</value>
</product>
   </function>


<function name="fcs/leading-edge-flap">
        <table>
            <independentVar lookup="row">/velocities/airspeed-kt</independentVar>
            <independentVar lookup="column">aero/alpha-deg</independentVar>
            <tableData>
                     0    4    7    10   15   20   25   30   35   40   45   50
              100    1    1    1    1    1    1    1    1    1    1    1    1
              200    1    1    1    1    1    1    1    1    1    1    1    1
              250    0    0    0.9  1    1    1    1    1    1    1    1    1
              300    0    0    0.8  0.9  1    1    1    1    1    1    1    1
              350    0    0    0.8  0.9  1    1    1    1    1    1    1    1
              400    0    0    0.7  0.8  0.9  1    1    1    1    1    1    1
              450    0    0    0.6  0.8  0.8  0.9  1    1    1    1    1    1
              500    0    0    0.5  0.6  0.7  0.8  0.9  1    1    1    1    1
              550    0    0    0.4  0.5  0.6  0.7  0.8  0.9  1    1    1    1
              600    0    0    0.3  0.4  0.5  0.6  0.7  0.8  0.9  1    1    1
              650    0    0    0.2  0.3  0.4  0.5  0.6  0.7  0.4  0.9  1    1
              700    0    0    0.1  0.2  0.3  0.4  0.5  0.6  0.7  0.8  0.9  1
            </tableData>
          </table>
   </function>

<function name="fcs/leading-edge-flap-gear">

        <table>
            <independentVar lookup="row">/gear/gear/position-norm</independentVar>
            <independentVar lookup="column">fcs/leading-edge-flap</independentVar>
            <tableData>
                    0    1
               0    0    1
               1    1    1
            </tableData>
          </table>

   </function>


  <channel name="Pitch">

   <kinematic name="leading edge flaps">
     <input>fcs/leading-edge-flap-gear</input> <!--Auto flaps when gear down, Manuel control when up-->
     <traverse>
       <setting>
          <position>  0 </position>
          <time>      0 </time>
       </setting>
       <setting>
          <position> 1 </position>
          <time>      0.8 </time>
       </setting>

     </traverse>
     <output>fcs/leading-edge-flap-main</output>
   </kinematic>


   <kinematic name="fbwelev">
     <input>fcs/elevator-cmd-norm</input> <!--Auto flaps when gear down, Manuel control when up-->
     <traverse>
       <setting>
          <position> -1 </position>
          <time>      0.5 </time>
       </setting>
       <setting>
          <position>  0 </position>
          <time>      0.5 </time>
       </setting>
       <setting>
          <position> 1 </position>
          <time>      0.5 </time>
       </setting>

     </traverse>
     <output>fcs/horiz-main</output>
   </kinematic>


   <summer name="Pitch Trim Sum">
      <input>fcs/horiz-main</input>
      <input>fcs/pitch-trim-cmd-norm</input>
      <input>fcs/pitch-trim-fbw</input>
      <clipto>
        <min> -1 </min>
        <max>  1 </max>
      </clipto>
   </summer>

   <aerosurface_scale name="Elevator Control">
      <input>fcs/elevator-pos-norm-limit</input>
      <range>
        <min> -0.35 </min>
        <max>  0.45 </max>
      </range>
      <output>fcs/elevator-pos-rad</output>
   </aerosurface_scale>

   <aerosurface_scale name="elevator normalization">
      <input>fcs/elevator-pos-rad</input>
      <domain>
        <min> -0.35 </min>
        <max>  0.35 </max>
      </domain>
      <range>
        <min> -1 </min>
        <max>  1 </max>
      </range>
      <output>fcs/elevator-pos-norm</output>
   </aerosurface_scale>

  </channel>

  <channel name="Roll">


   <kinematic name="fbwelev">
     <input>fcs/aileron-cmd-norm</input> <!--Auto flaps when gear down, Manuel control when up-->
     <traverse>
       <setting>
          <position> -1 </position>
          <time>      0.5 </time>
       </setting>
       <setting>
          <position>  0 </position>
          <time>      0.5 </time>
       </setting>
       <setting>
          <position> 1 </position>
          <time>      0.5 </time>
       </setting>

     </traverse>
     <output>fcs/ailern-main</output>
   </kinematic>

   <summer name="Roll Trim Sum">
      <input>fcs/ailern-main</input>
      <input>fcs/roll-trim-cmd-norm</input>
      <clipto>
        <min> -1 </min>
        <max>  1 </max>
      </clipto>
   </summer>

   <aerosurface_scale name="Left Aileron Control">
      <input>fcs/roll-trim-sum</input>
      <range>
        <min> -0.35 </min>
        <max>  0.35 </max>
      </range>
      <output>fcs/left-aileron-pos-rad</output>
   </aerosurface_scale>

   <aerosurface_scale name="Right Aileron Control">
      <input>fcs/roll-trim-sum</input>
      <range>
        <min> -0.35 </min>
        <max>  0.35 </max>
      </range>
      <output>fcs/right-aileron-pos-rad</output>
   </aerosurface_scale>

   <aerosurface_scale name="left aileron normalization">
      <input>fcs/left-aileron-pos-rad</input>
      <domain>
        <min> -0.35 </min>
        <max>  0.35 </max>
      </domain>
      <range>
        <min> -1 </min>
        <max>  1 </max>
      </range>
      <output>fcs/left-aileron-pos-norm</output>
   </aerosurface_scale>

   <aerosurface_scale name="right aileron normalization">
      <input>fcs/right-aileron-pos-rad</input>
      <domain>
        <min> -0.35 </min>
        <max>  0.35 </max>
      </domain>
      <range>
        <min> -1 </min>
        <max>  1 </max>
      </range>
      <output>fcs/right-aileron-pos-norm</output>
   </aerosurface_scale>

  </channel>

  <property value="1">fcs/yaw-damper-enable</property>
  <channel name="Yaw">

   <summer name="Rudder Command Sum">
      <input>fcs/rudder-cmd-norm</input>
      <input>fcs/yaw-trim-cmd-norm</input>
      <clipto>
        <min> -1 </min>
        <max>  1 </max>
      </clipto>
   </summer>

   <scheduled_gain name="Yaw Damper Rate">
      <input>velocities/r-aero-rad_sec</input>
      <table>
        <independentVar lookup="row">velocities/ve-kts</independentVar>
         <tableData>
            30     0.00
            60     2.00
         </tableData>
      </table>
      <gain>fcs/yaw-damper-enable</gain>
   </scheduled_gain>

   <summer name="Rudder Sum">
      <input>fcs/rudder-command-sum</input>
      <input>fcs/yaw-damper-rate</input>
      <clipto>
        <min> -1.1 </min>
        <max>  1.1 </max>
      </clipto>
   </summer>

   <aerosurface_scale name="Rudder Control">
      <input>fcs/rudder-sum</input>
      <domain>
        <min> -1.1 </min>
        <max>  1.1 </max>
      </domain>
      <range>
        <min> -0.35 </min>
        <max>  0.35 </max>
      </range>
      <output>fcs/rudder-pos-rad</output>
   </aerosurface_scale>

   <aerosurface_scale name="rudder normalization">
      <input>fcs/rudder-pos-rad</input>
      <domain>
        <min> -0.35 </min>
        <max>  0.35 </max>
      </domain>
      <range>
        <min> -1 </min>
        <max>  1 </max>
      </range>
      <output>fcs/rudder-pos-norm</output>
   </aerosurface_scale>

  </channel>

  <channel name="Flaps">


 <fcs_function name="tef pos rad">
  <function>
   <description>none</description>
   <sum>
   <product>
    <value>1</value>
    <table>
     <independentVar lookup="row">velocities/vc-kts</independentVar>
     <tableData>
      0 0.349
      150 0.349
      200 0
     </tableData>
    </table>
   </product>
   <product>
    <value>1</value>
        <table>
     <independentVar lookup="row">velocities/mach</independentVar>
     <tableData>
      0 0
      0.85 0
      0.95 -0.0349
     </tableData>
    </table>
   </product>
   </sum>
  </function>
 </fcs_function>

  <aerosurface_scale name="flap pos norm">
      <input>fcs/tef-pos-rad</input>
         <domain>
            <min>-0.0349</min>
            <max>0.349</max>
         </domain>
         <range>
            <min>-0.1</min>
            <max>1</max>
         </range>
      <output>fcs/flap-pos-norm</output>
   </aerosurface_scale>


  </channel>

  <channel name="Landing Gear">

            <switch name="gear-wow">
                <default value="0"/>
                <test logic="AND" value="1">
                    gear/unit[1]/WOW eq 1
                    gear/unit[2]/WOW eq 1
                </test>
            </switch>

   <kinematic name="Gear Control">
     <input>gear/gear-cmd-norm</input>
     <traverse>
       <setting>
          <position> 0 </position>
          <time>     0 </time>
       </setting>
       <setting>
          <position> 1 </position>
          <time>     5 </time>
       </setting>
     </traverse>
     <output>gear/gear-pos-norm</output>
   </kinematic>

  </channel>

  <channel name="Speedbrake">
   <kinematic name="Speedbrake Control">
     <input>fcs/speedbrake-cmd-norm</input>
     <traverse>
       <setting>
          <position> 0 </position>
          <time>     0 </time>
       </setting>
       <setting>
          <position> 1 </position>
          <time>     1 </time>
       </setting>
     </traverse>
     <output>fcs/speedbrake-pos-norm</output>
   </kinematic>

  </channel>
         <channel name="Leading Edge Flap">

            <switch name="lef pos rad">
                <default value="0.0"/>
                <test logic="AND" value="-0.0349">
                    fcs/gear-wow eq 1
                    gear/gear-pos-norm gt 0
                </test>
                <test logic="AND" value="0.436">
                    gear/gear-pos-norm eq 0
                    aero/alpha-rad gt 0.2618
                </test>
                <test logic="AND" value="0.262">
                    fcs/gear-wow eq 0
                    aero/alpha-rad gt 0.0873
                </test>
                <test logic="AND" value="-0.0349">
                    velocities/mach gt 0.9
                </test>
            </switch>

            <pure_gain name="slat pos norm">
              <input>fcs/lef-pos-rad</input>
              <gain>2.293578</gain>
            </pure_gain>

            <kinematic name="lef control">
                <input>fcs/slat-pos-norm</input>
                <traverse>
                    <setting>
                        <position>-1.0</position>
                        <time>3.0</time>
                    </setting>
                    <setting>
                        <position>1.0</position>
                        <time>3.0</time>
                    </setting>
                </traverse>
            </kinematic>

            <aerosurface_scale name="lef pos deg">
              <input>fcs/lef-control</input>
              <domain>
                <min>-1.0</min>
                <max>1.0</max>
              </domain>
              <range>
                <min>-25</min>
                <max>25</max>
              </range>
            </aerosurface_scale>

        </channel>
<channel name="misc">


   <kinematic name="Baydoors 1">
     <input>/controls/baydoors/AIM9X</input>
     <traverse>
       <setting>
          <position>  0 </position>
          <time>      0 </time>
       </setting>
       <setting>
          <position>  1 </position>
          <time>      0.3 </time>
       </setting>
     </traverse>
     <output>fcs/AIM9X</output>
   </kinematic>

   <kinematic name="Baydoors 2">
     <input>/controls/baydoors/AIM120</input>
     <traverse>
       <setting>
          <position>  0 </position>
          <time>      0 </time>
       </setting>
       <setting>
          <position>  1 </position>
          <time>      0.3 </time>
       </setting>
     </traverse>
     <output>fcs/AIM120</output>
   </kinematic>

        </channel>

 </flight_control>

 <aerodynamics>

  <axis name="LIFT">

    <function name="aero/force/Lift_alpha">
      <description>Lift due to alpha</description>
      <product>
          <property>aero/qbar-psf</property>
          <property>metrics/Sw-sqft</property>
          <table>
            <independentVar lookup="row">aero/alpha-rad</independentVar>
            <tableData>
              -0.20 -0.620
               0.00  0.080
               0.26  1.000
               0.60  0.848
            </tableData>
          </table>
      </product>
    </function>

    <function name="aero/force/Lift_flap">
       <description>Delta Lift due to flaps</description>
       <product>
           <property>aero/qbar-psf</property>
           <property>metrics/Sw-sqft</property>
           <property>fcs/flap-pos-deg</property>
           <value> 0.01167 </value>
       </product>
    </function>

    <function name="aero/force/Lift_flap_edge">
       <description>Delta Lift due to leading edge flaps</description>
       <product>
           <property>aero/qbar-psf</property>
           <property>metrics/Sw-sqft</property>
           <property>fcs/leading-edge-flap-main</property>
           <value> 0.08167 </value>
       </product>
    </function>

    <function name="aero/force/Lift_speedbrake">
       <description>Delta Lift due to speedbrake</description>
       <product>
           <property>aero/qbar-psf</property>
           <property>metrics/Sw-sqft</property>
           <property>fcs/speedbrake-pos-norm</property>
           <value>0.01267</value>
       </product>
    </function>

    <function name="aero/force/Lift_elevator">
       <description>Lift due to Elevator Deflection</description>
       <product>
           <property>aero/qbar-psf</property>
           <property>metrics/Sw-sqft</property>
           <property>fcs/elevator-pos-rad</property>
           <value>0.2</value>
       </product>
    </function>

  </axis>

  <axis name="DRAG">

    <function name="aero/force/Drag_basic">
       <description>Drag at zero lift</description>
       <product>
          <property>aero/qbar-psf</property>
          <property>metrics/Sw-sqft</property>
          <table>
            <independentVar lookup="row">aero/alpha-rad</independentVar>
            <tableData>
             -1.57    1.500
             -0.26    0.027
              0.00    0.021
              0.26    0.027
              1.57    0.700
            </tableData>
          </table>
       </product>
    </function>

    <function name="aero/force/Drag_induced">
       <description>Induced drag</description>
         <product>
           <property>aero/qbar-psf</property>
           <property>metrics/Sw-sqft</property>
           <property>aero/cl-squared</property>
           <value>0.10</value>
         </product>
    </function>

    <function name="aero/force/Drag_mach">
       <description>Drag due to mach</description>
        <product>
          <property>aero/qbar-psf</property>
          <property>metrics/Sw-sqft</property>
          <table>
            <independentVar lookup="row">velocities/mach</independentVar>
            <tableData>
                0.00      0.000
                0.51      0.001
                1.10      0.001
                1.80      0.008
                2.00      0.000 <!--Yay!-->
            </tableData>
          </table>
        </product>
    </function>

    <function name="aero/force/Drag_flap">
       <description>Drag due to flaps</description>
         <product>
           <property>aero/qbar-psf</property>
           <property>metrics/Sw-sqft</property>
           <property>fcs/flap-pos-deg</property>
           <value> 0.00267 </value>
         </product>
    </function>

    <function name="aero/force/Drag_gear">
       <description>Drag due to gear</description>
         <product>
           <property>aero/qbar-psf</property>
           <property>metrics/Sw-sqft</property>
           <property>gear/gear-pos-norm</property>
           <value>0.02</value>
         </product>
    </function>

    <function name="aero/force/Drag_speedbrake">
       <description>Drag due to speedbrakes</description>
         <product>
           <property>aero/qbar-psf</property>
           <property>metrics/Sw-sqft</property>
           <property>fcs/speedbrake-pos-norm</property>
           <value>0.121</value>
         </product>
    </function>

    <function name="aero/force/Drag_beta">
       <description>Drag due to sideslip</description>
       <product>
          <property>aero/qbar-psf</property>
          <property>metrics/Sw-sqft</property>
          <table>
            <independentVar lookup="row">aero/beta-rad</independentVar>
            <tableData>
              -1.57    1.230
              -0.26    0.050
               0.00    0.000
               0.26    0.050
               1.57    1.230
            </tableData>
          </table>
       </product>
    </function>

    <function name="aero/force/Drag_elevator">
       <description>Drag due to Elevator Deflection</description>
       <product>
           <property>aero/qbar-psf</property>
           <property>metrics/Sw-sqft</property>
           <abs><property>fcs/elevator-pos-norm</property></abs>
           <value>0.001</value>
       </product>
    </function>

  </axis>

  <axis name="SIDE">

    <function name="aero/force/Side_beta">
       <description>Side force due to beta</description>
       <product>
           <property>aero/qbar-psf</property>
           <property>metrics/Sw-sqft</property>
           <property>aero/beta-rad</property>
           <value>-1</value>
       </product>
    </function>

  </axis>

  <axis name="ROLL">

    <function name="aero/moment/Roll_beta">
       <description>Roll moment due to beta</description>
       <product>
           <property>aero/qbar-psf</property>
           <property>metrics/Sw-sqft</property>
           <property>metrics/bw-ft</property>
           <property>aero/beta-rad</property>
           <value>-0.1</value>
       </product>
    </function>

    <function name="aero/moment/Roll_damp">
       <description>Roll moment due to roll rate</description>
       <product>
           <property>aero/qbar-psf</property>
           <property>metrics/Sw-sqft</property>
           <property>metrics/bw-ft</property>
           <property>aero/bi2vel</property>
           <property>velocities/p-aero-rad_sec</property>
           <value>-0.4</value>
       </product>
    </function>

    <function name="aero/moment/Roll_yaw">
       <description>Roll moment due to yaw rate</description>
       <product>
           <property>aero/qbar-psf</property>
           <property>metrics/Sw-sqft</property>
           <property>metrics/bw-ft</property>
           <property>aero/bi2vel</property>
           <property>velocities/r-aero-rad_sec</property>
           <value>0.15</value>
       </product>
    </function>

    <function name="aero/moment/Roll_aileron">
       <description>Roll moment due to aileron</description>
       <product>
          <property>aero/qbar-psf</property>
          <property>metrics/Sw-sqft</property>
          <property>metrics/bw-ft</property>
          <property>fcs/left-aileron-pos-rad</property>
          <value>0.11</value>
       </product>
    </function>

    <function name="aero/moment/Roll_rudder">
       <description>Roll moment due to rudder</description>
       <product>
           <property>aero/qbar-psf</property>
           <property>metrics/Sw-sqft</property>
           <property>metrics/bw-ft</property>
           <property>fcs/rudder-pos-rad</property>
           <value>0.01</value>
       </product>
    </function>

  </axis>

  <axis name="PITCH">

    <function name="aero/moment/Pitch_alpha">
       <description>Pitch moment due to alpha</description>
       <product>
           <property>aero/qbar-psf</property>
           <property>metrics/Sw-sqft</property>
           <property>metrics/cbarw-ft</property>
           <property>aero/alpha-rad</property>
           <value>-0.4</value>
       </product>
    </function>

    <function name="aero/moment/Pitch_elevator">
       <description>Pitch moment due to elevator</description>
       <product>
          <property>aero/qbar-psf</property>
          <property>metrics/Sw-sqft</property>
          <property>metrics/cbarw-ft</property>
          <property>fcs/elevator-pos-rad</property>
          <table>
            <independentVar lookup="row">velocities/mach</independentVar>
            <tableData>
              0.0     -1.000
              2.0     -0.200
            </tableData>
          </table>
       </product>
    </function>

    <function name="aero/moment/Pitch_damp">
       <description>Pitch moment due to pitch rate</description>
       <product>
           <property>aero/qbar-psf</property>
           <property>metrics/Sw-sqft</property>
           <property>metrics/cbarw-ft</property>
           <property>aero/ci2vel</property>
           <property>velocities/q-aero-rad_sec</property>
           <value>-18</value>
       </product>
    </function>

    <function name="aero/moment/Pitch_alphadot">
       <description>Pitch moment due to alpha rate</description>
       <product>
           <property>aero/qbar-psf</property>
           <property>metrics/Sw-sqft</property>
           <property>metrics/cbarw-ft</property>
           <property>aero/ci2vel</property>
           <property>aero/alphadot-rad_sec</property>
           <value>-9</value>
       </product>
    </function>

  </axis>

  <axis name="YAW">

    <function name="aero/moment/Yaw_beta">
       <description>Yaw moment due to beta</description>
       <product>
           <property>aero/qbar-psf</property>
           <property>metrics/Sw-sqft</property>
           <property>metrics/bw-ft</property>
           <property>aero/beta-rad</property>
           <value>0.12</value>
       </product>
    </function>

    <function name="aero/moment/Yaw_damp">
       <description>Yaw moment due to yaw rate</description>
       <product>
           <property>aero/qbar-psf</property>
           <property>metrics/Sw-sqft</property>
           <property>metrics/bw-ft</property>
           <property>aero/bi2vel</property>
           <property>velocities/r-aero-rad_sec</property>
           <value>-0.15</value>
       </product>
    </function>

    <function name="aero/moment/Yaw_rudder">
       <description>Yaw moment due to rudder</description>
       <product>
           <property>aero/qbar-psf</property>
           <property>metrics/Sw-sqft</property>
           <property>metrics/bw-ft</property>
           <property>fcs/rudder-pos-rad</property>
           <value>-0.1</value>
       </product>
    </function>

    <function name="aero/moment/Yaw_aileron">
       <description>Adverse yaw</description>
       <product>
           <property>aero/qbar-psf</property>
           <property>metrics/Sw-sqft</property>
           <property>metrics/bw-ft</property>
           <property>fcs/left-aileron-pos-rad</property>
           <value>0</value>
       </product>
    </function>

  </axis>

 </aerodynamics>

 <external_reactions>

 </external_reactions>

</fdm_config>
